*INCLUDE, INPUT=example_runfiles/example3_tuning_fork.inp
*NSET, NSET=bc_nodes
5,2,3,6,7,4,8,9
**
*MATERIAL, NAME=mid
*DENSITY
                 7.85E-9,
*ELASTIC, TYPE=ISOTROPIC
                 210000.,                      0.3
**
*SOLID SECTION, ELSET=pid, MATERIAL=mid
**
**
**
**
*NODE
       2,                       0.,                      20.,                       0.
       3,                       0.,                       0.,                       0.
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**
** SOLID ELEMENTS
**
*ELEMENT, TYPE=C3D20, ELSET=pid
      43,        5,        2,        3,        6,     1028,     1008,     1003,     1039,        7,        4,        8,        9,     1054,     1002,     1006,
    1100,     1098,     1050,     1001,     1119
      44,     1028,     1008,     1003,     1039,     1030,     1010,     1009,     1041,     1054,     1002,     1006,     1100,     1059,     1055,     1057,
    1103,     1099,     1053,     1005,     1120
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**
**
**
**
**
**
**
**
*BOUNDARY, TYPE=DISPLACEMENT
bc_nodes,        1,        3,                       0.
**
**
**
*CLOAD
1025,1,-1E3
1027,1,-1E3
1095,1,-1E3
**
*STEP
*STATIC
0.1
*END STEP
**
*STEP, NAME=Anonymous STEP 1
*FREQUENCY, EIGENSOLVER=LANCZOS
      20,
** *NODE PRINT
** U,
** *END STEP
**
** STEP 2
**
** *STEP, NAME=Anonymous STEP 2
**
**
** *MATRIX GENERATE, STIFFNESS, MASS
** *MATRIX OUTPUT, STIFFNESS, MASS, FORMAT=COORDINATE
** *END STEP
